G := 100  # В тоннах
p := 0.68
d := 0.05
R := 3500  # В минутах
G := 3
# коэффициенты
Inv := 0.6
Iso := 0.7
Conv := 0.7
v := 2
koef := 1.5
Tnew := 1.2
new_koef := 0.55
loss_percent := 22
N := 50
S := G/(p*d) = 88.2353
S := 3000  # НУЖНО ОКРУГЛИТЬ ВРУЧНУЮ
r := sqrt(S/π) = 30.9019
r := round(r) = 31
l := 2*r = 62
Giso := G*Iso = 2.1  # Изометрия
Ginv := G*5*Inv = 9  # Инверсия
Gconv := G*Conv/5 = 0.42  # Конвекция
SHiso := Giso*0.15 = 0.315
SHinv := Ginv*0.03 = 0.27
SHconv := Gconv*0.8 = 0.336
v := v*koef = 3  # Средняя скорость ветра
t := R/(60*v) = 19.4444
Tnew := Tnew*new_koef*60 = 39.6
danger := N*loss_percent/100 = 11
easy := danger*0.25 = 2.75
medium_and_hard := danger*0.4 = 4.4
death := danger*0.35 = 3.85
