tstart := 5
twork := 5
pstart := 7
kdown := 7
dcan := 4
tfinish := tstart + twork = 10
P1 := pstart*(1/tstart)^-0.4 = 13.3256
Kpk := 0.402
Kpn := 0.525
P10 := pstart*Kpk/Kpn = 5.36
Daes := 1.7*(P10*tfinish - pstart*tstart) = 31.62
Dpomesch := Daes/kdown = 4.51714
A := P1/dcan = 3.33139  # Если меньше 1 то по таблице, иначе
Tstay := (1/(1.7*A) + tstart^0.6)^1.7 = 5.76748
A := P1/(dcan*kdown) = 0.475913  # Это всегда по таблице
tk := tstart + 8 = 13
Pk := pstart*(tk/tstart)^-0.4 = 4.77649
Dobl := 1.7*(Pk*tk - pstart*tstart)/kdown = 6.58006
tk := tstart + 48 = 53
Pk := pstart*(tk/tstart)^-0.4 = 2.72255
Dobl := 1.7*(Pk*tk - pstart*tstart)/kdown = 26.5431
tk := tstart + 720 = 725
Pk := pstart*(tk/tstart)^-0.4 = 0.956205
Dobl := 1.7*(Pk*tk - pstart*tstart)/kdown = 159.86
tk := tstart + 604800 = 604805
Pk := pstart*(tk/tstart)^-0.4 = 0.0648694
Dobl := 1.7*(Pk*tk - pstart*tstart)/kdown = 9519.6
