y := 11
x := 5
A := 5
fs := 48
F := fs*x/y = 21.8182
k := y/x = 2.2
A := 5
v := 6
h := 1000
i := 0, h^-1 .. 2*y
a := 2*π*x*y^-1
j := 0, 1 .. 2*y
n(i) := 0
B(i) := floor(i + h^-1)
U(i) := A*sin(a*i)
Ud(j) := A*sin(a*j)
Udh(i) := A*sin(a*floor(B(i)))
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