fs := 48  # kHz
k := 20
A := 1.51
v := 2
F := fs/k
h := 1000
i := 0, h^-1 .. k
a := 2*π*k^-1
j := 0, 1 .. k
B(i) := floor(i + h^-1)
U(i) := A*sin(a*i)
Ud(j) := A*sin(a*j)
Uh(i) := A*sin(a*B(i))
Uq(j) := floor(A*sin(a*j) + 0.5)
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